# LAMMPS Input Script

# command to run:
# lmp -var F C92x5x5.data -var M CH4.lmp -i input_gas.lammps

# F is file, M is molecule

units real
atom_style full

# create a box first
# include vacuum in the x and y, z should be fixed.
boundary p p f

# no kspace
# Define force field parameters
pair_style lj/charmm/coul/charmm 8.0 10.0 8.0 10.0

bond_style harmonic
angle_style harmonic
dihedral_style opls
improper_style cvff

read_data data/$F

# Set up simulation
run_style verlet
neighbor 2.0 bin
neigh_modify delay 0 every 1 check yes


variable z equal (-1*zlo)
variable x equal xhi
variable y equal yhi

# the limits of where we can teleport the gas molecule
variable h equal (zhi)
variable l equal (zhi+(2*zlo))

# Define output
thermo 1000
thermo_style custom step temp etotal pe ke press vol lx ly lz
if "${T} == solubility" then "jump SELF do_freeze" elif "${T} == diffusion" then "jump SELF do_npt" else "jump SELF do_normal"

label do_freeze
#Freeze bottom region
  region edgeR block 0 $x 0 $y 0 $z
  group edge region edgeR
  fix 2 edge setforce NULL 0.0 0.0

# Define the Z
  fix zwalls all wall/reflect zlo EDGE zhi EDGE

  # define mobile region
  region mobileR block 0 $x 0 $y $z $h

  jump SELF after_logic

label do_npt
  fix 3all all npt temp 300.0 300.0 100.0
  run 10000
   # define mobile ensemble
  region mobileR block xlo xhi ylo yhi zlo zhi
  jump SELF after_logic


label do_normal
  print """
  Invalid T input
  """

  quit


label after_logic
print """
FILE = $F
Molecule = $M
"""

# define ensemble for mobile region
group mobile region mobileR
fix 1 mobile nvt temp 300.0 300.0 100.0

minimize 0.0 1.0e-8 1000 100000
run 100

# Define molecule template
molecule CH4mol molecules/$M

group methane id > 2300
dump 1 methane custom 1 methane.xyz id type x y z vx vy vz fx fy fz
dump 2 all xyz 100 Details.xyz

variable i loop 10000
label myfirstloop

variable s equal step
create_atoms 0 random 1 $s mobileR mol CH4mol 55
group methane id > 2300

fix 3 methane nvt temp 300.0 300.0 100.0


velocity all create $s 4928459 rot yes dist gaussian
minimize 0.0 1.0e-8 1000 10000


print """
The Minimization Stopped at Step = $s
"""
run 1000


print """
The Jiggling Stopped at Step = $s
"""
delete_atoms group methane
next i
jump SELF myfirstloop

print """
Top of Gas = $h
Bottom of Gas = $l
X = $x
Y = $y
"""
